airplane
#Mach
0.0
#IYsym   IZsym   Zsym
0   0   0.0
#Sref    Cref    Bref
0.15006000000000005 0.183 0.8200000000000003
#Xref    Yref    Zref
0.0 0.0 0.0
# CDp
0.0
#============================================================
SURFACE
main_wing
#Nchordwise  Cspace
10   1
YDUPLICATE
0.0
SECTION
#Xle    Yle    Zle     Chord   Ainc  Nspanwise  Sspace
0.1921 0.0 -0.0445 0.183 0.0   1   1
AFIL
af0.dat
CLAF
1.09
SECTION
#Xle    Yle    Zle     Chord   Ainc  Nspanwise  Sspace
0.19211300000000012 0.017047725 -0.043397573076753265 0.183 0.0   1   1
AFIL
af0.dat
CLAF
1.09
SECTION
#Xle    Yle    Zle     Chord   Ainc  Nspanwise  Sspace
0.19211300000000012 0.03409545 -0.04229514615350653 0.183 0.0   1   1
AFIL
af0.dat
CLAF
1.09
SECTION
#Xle    Yle    Zle     Chord   Ainc  Nspanwise  Sspace
0.19211300000000012 0.051143175 -0.04119271923025981 0.183 0.0   1   1
AFIL
af0.dat
CLAF
1.09
SECTION
#Xle    Yle    Zle     Chord   Ainc  Nspanwise  Sspace
0.19211300000000012 0.068190901 -0.040090292242345976 0.183 0.0   1   1
AFIL
af0.dat
CLAF
1.09
SECTION
#Xle    Yle    Zle     Chord   Ainc  Nspanwise  Sspace
0.19211300000000012 0.085238626 -0.038987865319099244 0.183 0.0   1   1
AFIL
af0.dat
CLAF
1.09
SECTION
#Xle    Yle    Zle     Chord   Ainc  Nspanwise  Sspace
0.19211300000000012 0.102286351 -0.03788543839585251 0.183 0.0   1   1
AFIL
af0.dat
CLAF
1.09
SECTION
#Xle    Yle    Zle     Chord   Ainc  Nspanwise  Sspace
0.19211300000000012 0.119334076 -0.03678301147260578 0.183 0.0   1   1
AFIL
af0.dat
CLAF
1.09
SECTION
#Xle    Yle    Zle     Chord   Ainc  Nspanwise  Sspace
0.19211300000000012 0.136381801 -0.035680584549359046 0.183 0.0   1   1
AFIL
af0.dat
CLAF
1.09
SECTION
#Xle    Yle    Zle     Chord   Ainc  Nspanwise  Sspace
0.19211300000000012 0.153429526 -0.03457815762611231 0.183 0.0   1   1
AFIL
af0.dat
CLAF
1.09
SECTION
#Xle    Yle    Zle     Chord   Ainc  Nspanwise  Sspace
0.19211300000000012 0.170477251 -0.03347573070286558 0.183 0.0   1   1
AFIL
af0.dat
CLAF
1.09
SECTION
#Xle    Yle    Zle     Chord   Ainc  Nspanwise  Sspace
0.19211300000000012 0.187524977 -0.03237330371495175 0.183 0.0   1   1
AFIL
af0.dat
CLAF
1.09
SECTION
#Xle    Yle    Zle     Chord   Ainc  Nspanwise  Sspace
0.19211300000000012 0.204572702 -0.03127087679170502 0.183 0.0   1   1
AFIL
af0.dat
CLAF
1.09
SECTION
#Xle    Yle    Zle     Chord   Ainc  Nspanwise  Sspace
0.19211300000000012 0.221620427 -0.030168449868458284 0.183 0.0   1   1
AFIL
af0.dat
CLAF
1.09
SECTION
#Xle    Yle    Zle     Chord   Ainc  Nspanwise  Sspace
0.19211300000000012 0.238668152 -0.029066022945211555 0.183 0.0   1   1
AFIL
af0.dat
CLAF
1.09
SECTION
#Xle    Yle    Zle     Chord   Ainc  Nspanwise  Sspace
0.19211300000000012 0.255715877 -0.027963596021964826 0.183 0.0   1   1
AFIL
af0.dat
CLAF
1.09
SECTION
#Xle    Yle    Zle     Chord   Ainc  Nspanwise  Sspace
0.19211300000000012 0.272763602 -0.026861169098718093 0.183 0.0   1   1
AFIL
af0.dat
CLAF
1.09
SECTION
#Xle    Yle    Zle     Chord   Ainc  Nspanwise  Sspace
0.19211300000000012 0.289811327 -0.02575874217547136 0.183 0.0   1   1
AFIL
af0.dat
CLAF
1.09
SECTION
#Xle    Yle    Zle     Chord   Ainc  Nspanwise  Sspace
0.19211300000000012 0.306859053 -0.02465631518755753 0.183 0.0   1   1
AFIL
af0.dat
CLAF
1.09
SECTION
#Xle    Yle    Zle     Chord   Ainc  Nspanwise  Sspace
0.19211300000000012 0.323906778 -0.023553888264310797 0.183 0.0   1   1
AFIL
af0.dat
CLAF
1.09
SECTION
#Xle    Yle    Zle     Chord   Ainc  Nspanwise  Sspace
0.19211300000000012 0.340954503 -0.022451461341064065 0.183 0.0   1   1
AFIL
af0.dat
CLAF
1.09
SECTION
#Xle    Yle    Zle     Chord   Ainc  Nspanwise  Sspace
0.19211300000000012 0.358002228 -0.02134903441781734 0.183 0.0   1   1
AFIL
af0.dat
CLAF
1.09
SECTION
#Xle    Yle    Zle     Chord   Ainc  Nspanwise  Sspace
0.19211300000000012 0.375049953 -0.020246607494570606 0.183 0.0   1   1
AFIL
af0.dat
CLAF
1.09
SECTION
#Xle    Yle    Zle     Chord   Ainc  Nspanwise  Sspace
0.19211300000000012 0.392097678 -0.019144180571323874 0.183 0.0   1   1
AFIL
af0.dat
CLAF
1.09
SECTION
#Xle    Yle    Zle     Chord   Ainc  Nspanwise  Sspace
0.19211300000000012 0.409145403 -0.018041753648077145 0.183 0.0   1   1
AFIL
af0.dat
CLAF
1.09
#============================================================
SURFACE
elevator
#Nchordwise  Cspace
10   1
YDUPLICATE
0.0
SECTION
#Xle    Yle    Zle     Chord   Ainc  Nspanwise  Sspace
0.5939607139017022 0.0 0.008033935609077256 0.118771 -1.5   1   1
AFIL
af1.dat
CLAF
1.09
SECTION
#Xle    Yle    Zle     Chord   Ainc  Nspanwise  Sspace
0.596941155410718 0.017047725 0.008111981216673891 0.11434969010263844 -1.5   1   1
AFIL
af1.dat
CLAF
1.09
SECTION
#Xle    Yle    Zle     Chord   Ainc  Nspanwise  Sspace
0.5999215969197337 0.03409545 0.008190026824270526 0.1099283802052769 -1.5   1   1
AFIL
af1.dat
CLAF
1.09
SECTION
#Xle    Yle    Zle     Chord   Ainc  Nspanwise  Sspace
0.6029020384287495 0.051143175 0.008268072431867161 0.10550707030791534 -1.5   1   1
AFIL
af1.dat
CLAF
1.09
SECTION
#Xle    Yle    Zle     Chord   Ainc  Nspanwise  Sspace
0.6058824801125945 0.068190901 0.008346118044041863 0.10108576015120482 -1.5   1   1
AFIL
af1.dat
CLAF
1.09
SECTION
#Xle    Yle    Zle     Chord   Ainc  Nspanwise  Sspace
0.6088629216216102 0.085238626 0.008424163651638499 0.09666445025384326 -1.5   1   1
AFIL
af1.dat
CLAF
1.09
SECTION
#Xle    Yle    Zle     Chord   Ainc  Nspanwise  Sspace
0.6118433631306259 0.102286351 0.008502209259235134 0.0922431403564817 -1.5   1   1
AFIL
af1.dat
CLAF
1.09
SECTION
#Xle    Yle    Zle     Chord   Ainc  Nspanwise  Sspace
0.6148238046396417 0.119334076 0.008580254866831769 0.08782183045912015 -1.5   1   1
AFIL
af1.dat
CLAF
1.09
SECTION
#Xle    Yle    Zle     Chord   Ainc  Nspanwise  Sspace
0.6178042461486574 0.136381801 0.008658300474428404 0.08340052056175859 -1.5   1   1
AFIL
af1.dat
CLAF
1.09
SECTION
#Xle    Yle    Zle     Chord   Ainc  Nspanwise  Sspace
0.6207846876576731 0.153429526 0.008736346082025039 0.07897921066439703 -1.5   1   1
AFIL
af1.dat
CLAF
1.09
SECTION
#Xle    Yle    Zle     Chord   Ainc  Nspanwise  Sspace
0.6228947885130102 0.16549901939392672 0.008791601017525968 0.075849 -1.5   1   1
AFIL
af1.dat
CLAF
1.09
#============================================================
SURFACE
rudder
#Nchordwise  Cspace
10   1
SECTION
#Xle    Yle    Zle     Chord   Ainc  Nspanwise  Sspace
0.5814 0.0 -0.009652 0.1862000000000001 0.0   1   1
AFIL
af2.dat
CLAF
1.09
SECTION
#Xle    Yle    Zle     Chord   Ainc  Nspanwise  Sspace
0.5876239090909091 5.695444116327051e-18 0.007448 0.1765272727272728 0.0   1   1
AFIL
af2.dat
CLAF
1.09
SECTION
#Xle    Yle    Zle     Chord   Ainc  Nspanwise  Sspace
0.5938478181818182 1.1390888232654106e-17 0.024548 0.16685454545454553 0.0   1   1
AFIL
af2.dat
CLAF
1.09
SECTION
#Xle    Yle    Zle     Chord   Ainc  Nspanwise  Sspace
0.6000717272727273 1.7086332348981157e-17 0.041648 0.15718181818181826 0.0   1   1
AFIL
af2.dat
CLAF
1.09
SECTION
#Xle    Yle    Zle     Chord   Ainc  Nspanwise  Sspace
0.6062956363636364 2.278177646530821e-17 0.058748 0.14750909090909098 0.0   1   1
AFIL
af2.dat
CLAF
1.09
SECTION
#Xle    Yle    Zle     Chord   Ainc  Nspanwise  Sspace
0.6125195454545455 2.847722058163526e-17 0.075848 0.1378363636363637 0.0   1   1
AFIL
af2.dat
CLAF
1.09
SECTION
#Xle    Yle    Zle     Chord   Ainc  Nspanwise  Sspace
0.6187434545454545 3.4172664697962314e-17 0.092948 0.12816363636363642 0.0   1   1
AFIL
af2.dat
CLAF
1.09
SECTION
#Xle    Yle    Zle     Chord   Ainc  Nspanwise  Sspace
0.6249673636363636 3.986810881428937e-17 0.110048 0.11849090909090916 0.0   1   1
AFIL
af2.dat
CLAF
1.09
SECTION
#Xle    Yle    Zle     Chord   Ainc  Nspanwise  Sspace
0.6311912727272728 4.556355293061642e-17 0.127148 0.10881818181818187 0.0   1   1
AFIL
af2.dat
CLAF
1.09
SECTION
#Xle    Yle    Zle     Chord   Ainc  Nspanwise  Sspace
0.6374151818181819 5.125899704694347e-17 0.144248 0.0991454545454546 0.0   1   1
AFIL
af2.dat
CLAF
1.09
SECTION
#Xle    Yle    Zle     Chord   Ainc  Nspanwise  Sspace
0.643639090909091 5.695444116327052e-17 0.161348 0.08947272727272734 0.0   1   1
AFIL
af2.dat
CLAF
1.09
SECTION
#Xle    Yle    Zle     Chord   Ainc  Nspanwise  Sspace
0.6498630000000001 6.264988527959757e-17 0.178448 0.07980000000000005 0.0   1   1
AFIL
af2.dat
CLAF
1.09
